x := 0.01, 0.02 .. 0.5
y := 100, 110 .. 2110
z(x, y) := 89.4154 - 0.8795/x^3 - 1439.5525*x + 6319.5107*x^2 + 72560000000/y^3 - 2.2713e12*x/y^3 + 2.368e13*x^2/y^3 - 2.225e12*x^3/y^3 - 0.01075*y + 0.304*x*y - 1.7045*x^2*y
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